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# Αριθμός βημάτων επαναλήψεων
j_count := 20
j_l := j_count - 1
j := 0, 1 .. j_l
LITest(min, max) :=
    for j ∈ 0 .. j_l
        y[j] ← min + (max - min)/j_count*j
    y
# [reference: steam_IFC67.mcd]
# Θερμοδυναμικές ιδιότητες νερού (11)
# Δεδομένα Case Study
# Αριθμός των effects
minGTlimit := 400
n_l := n_ef - 1
# Αλατότητα Τροφοδοτικό νερού σε ppm
n := 0, 1 .. n_l
X_f := LITest(5000, 5000)
T_b[n_l, j_l] := 0
# Αναλογία παραγόμενου προς τροφοδοτικού νερού
DT[n_l, j_l] := 0
ratio := LITest(0.714, 0.714)  # To MED Parallel-Cross Flow μπορεί μέχρι και 0.714 (13)
# Αλατότητα αποβαλλόμενης άλμης
C_1 := 0.477
C_2 := 0.93740  # Βιβλιογραφία
X_bout[j] := X_f[j]/(1 - ratio[j])
X_bout[0] = 17482.5
C_3 := 0.00655  # (1): http://soda-is.com/ (βασισμένο στο meteonorm)
# (2) http://www.engineeringtoolbox.com/sodium-chloride-water-d_1187.html
# Ηλιακός συλλέκτης
# 6 συλλ για 4 ατομα
# (3) http://postgra.hydro.ntua.gr/docs/lessons/23/koumantakis/K7.pdf
# Μοντέλο συλλέκτη SolarUS FP1, δεδομένα από πιστοποίηση από το SRCC
# (4): Στοιχεία από ΚΑΠΕ
A_c1 := 2.01  # Καθαρή επιφάνεια συλλογής ενός συλλέκτη
n_coll := LITest(1, 1)  # Αριθμός συλλεκτών  # (5): ΚΑΠΕ PRODES Solar Thermal
# (6) www.dow.com
A_c := A_c1*n_coll  # Επιφάνεια σε m^2
# (7): ΚΑΠΕ PRODES RES Desalination
# Πρωτοβάθμιοι όροι
# Δευτεροβάθμιοι όροι
C_1 := 0.642
FRτα := 0.644  # "Y Intercept": (Παράγων θερμικής απολαβής)*(Διαπερατότητα καλλύματος*Απορροφητικότητα απορροφητήρα)
C_2 := 3.23590  # (8) Θερμικά - Ηλιακά Συστήματα - Κίμων Αντωνόπουλος
C_3 := 0.00372  # (9) PVGIS - JRC: http://www.pvtech.gr/pvgis.html
FRU_L := 3.536  # "Slope": (Παράγων θερμικής απολαβής)*(Συντελεστής μεταφοράς θερμότητας απωλειών στο περιβάλλον) σε (W/(m^2*C))
# (10) Αρχές μεταφοράς θερμότητας και μάζας - Ξενοφών Κακάτσιος
minGTlimit := 400  # (11) International Formulation Commitee IFC 1967
# Για χαμηλά ΔΤ(<100) έχει διαπιστωθεί ότι το πολυώνυμο α'βαθμού έχει αμελητέα διαφορά
# από αυτό του δεύτερου.
# (12) The natural circulation solar water heater model with linear temperature distribution,
# Renewable Energy, Elsevier
# Ορίζονται οι θερμοκρασίες
# Τροφοδοτικού νερού | Γλυκόλης στην έξοδο του συλλέκτη
T_f := LITest(15, 15)
T_out := LITest(55, 55)
# (13) Fundamentals of Water Desalination σελ 187
# Τροφοδοτικού νερού μετά την προθέρμανση
# Αποβαλλόμενης άλμης στο τελευταίο effect
# (14)
# MODELLING AND THERMODYNAMIC ANALYSIS OF A MULTI EFFECT
# DISTILLATION (MED) PLANT FOR SEAWATER DESALINATION,
# ΕΜΠ Τμήμα Μεταλλειολόγων, Artin Hatzikioseyian, Roza Vidali, Pavlina Kousi
T_b[n_l, j] := LITest(40, 40)[j]
T_fout := LITest(35, 35)
# -Σταθερός β.α. στους εναλλάκτες (fundamentals) και τα effects, ίσος με 0.8
n_HE ≡ 0.8
# Θερμικές απώλειες στο συμπυκνωτή ίσες με 10% της συναλλασόμενης θερμότητας
n_cond := 0.9
# Ορισμοί
h_fg(T) := 2499.5698 - 2.204864*T - 2.304*10^-3*T^2
# X_f | Η αλατότητα του τροφοδοτικού νερού
# T_a | Θερμοκρασία Περιβάλλοντος | [1]
# T_in | Θερμοκρασία ρευστού στην είσοδο του συλλέκτη
# T_out | Θερμοκρασία ρευστού στην έξοδο του συλλέκτη
# T_f | Θερμοκρασία τροφοδοτικου νερού
# C_pc | Θερμοχωρητικότητα ψυκτικού (kJ/kgC)
# C_pw | Θερμοχωρητικότητα τροφοδοτικού νερού  (kJ/kgC)
# U | Ειδική συναγωγιμότητα στον εναλλάκτη του αποστακτήρα
# BPE | Ανύψωση σημείου βρασμού
# Ισολογισμός παροχής νερού
m_f == m_s + m_b
# ιση παροχή σε όλα τα effects
# Ισολογισμός μάζας αλάτων | η άλμη ανακυκλοφορεί στο επόμενο effect
x_f*m_f == x_b*m_b
# Όπως και στους ηλιακούς θερμοσίφωνες, ένα βοηθητικό σύστημα μπορεί εξασφαλίζει ότι η θερμοκρασία δεν θα πέσει ποτέ κάτω από τους 55 Κελσίου, εξασφαλίζοντας συνεχώς τη λειτουργία του αποστακτήρα. Εδώ μελετάται η περίπτωση που αυτό δεν χρησιμοποιείται, μηδενίζοντας την παροχη για ακτινοβολία κάτω των 400 W/m^2, κάτω από την οποία η παροχή θα έπεφτε σε
# τιμές χαμηλότερες της φυσικής κυκλοφορίας.
# Παραδοχες
# -Η απόδοση των συλλεκτών στις τιμές παροχής ρευστού που χρησιμοποιούνται είναι αρκετά κοντά στην απόδοση για την παροχή για την οποία δοκιμάστηκε ο συλλέκτης στην πιστοποίησή του
# -Στον συμπυκνωτή κυκλοφορεί τροφοδοτικό νερό υγροποιώντας τον ατμό, μέρος του οποίου
# δεν εισέρχεται στον αποστακτήρα. Η αναλογία ψυκτικού και τροφοδοτικού νερού ρυθμίζεται
# έτσι ώστε το τροφοδοτικό νερό να έχει θερμοκρασία 35 βαθμών στην έξοδο του συμπυκνωτή.
T_fout[0] = 35
# -Συνολικές απώλειες ανά effect από την πτώση πίεσης από βαρύτητα, επιτάχυνση και τριβή θεωρούνται ίσες με θερμοκρασιακή πτώση(13):
DT_p := 1
# Η πτώση πίεσης από τη συμπύκνωση θεωρείται αμελητέα (13)
# Ανύψωση σημείου βρασμού από την αλατότητα
# Για την εκτίμηση του BPE και του NEA, θεωρείται προσεγγιστικά γραμμική η αύξηση της αλατότητας ανά effect.  Οι τιμές επιρρεάζουν ελάχιστα το αποτέλεσμα και επιρρεάζονται οι ίδιες λίγο από την αλατότητα, οπότε το σφάλμα είναι εξαιρετικά μικρό για την παραδοχή αυτή.
Xapr[n, j] := X_f[j] + (X_bout[j] - X_f[j])/n_ef*n
# Για αλατότητα από 1 μέχρι 16% και θερμοκρασίες από 10 εώς 180 Κελσίου, ισχύει:
(13)
BPE(T, X) := (8.325*10^-2 + 1.883*10^-4*T + 4.02*10^-6*T^2)*X/10000 + (-7.625*10^-4 + 9.02*10^-5*T - 5.2*10^-7*T^2)*(X/10000)^2 + (1.522*10^-4 - 3*10^-6*T - 3*10^-8*T^2)*(X/10000)^3
# -Θεωρείται ότι ο ατμός δεσμεύει και αποβάλλει μόνο λανθάνουσα θερμότητα
# -Θερμοκρασία τροφοδοτικού νερού (3)
# Η θερμοκρασία του τροφοδοτικού νερού θεωρείται περίπου σταθερή για όλη τη διάρκεια του
# χρόνου και ίση με 15 Κελσίου (σύμβαση που αναγκάστηκε να γίνει λόγω έλλειψης πιο λεπτομερών στοιχείων)
T_f[0] = 15
# -Η θερμοκρασία εξόδου άλμης και πόσιμου νερού είναι περίπου ίδια
# και ίση με 40 Κελσίου (5), (7), (13)
T_b[n_l, 0] = 40
# -Η παροχή νερού και η παροχή του ψυκτικού ελέγχονται από αυτόματο σύστημα
# ώστε να διατηρηθούν οι καθορισμένες θερμοκρασίες στο ρευστό Tin και Τout
# Η μέγιστη θερμοκρασία λειτουργίας του MED είναι 71.7 Κελσίου. Θεωρώ θερμοκρασία εξόδου από το συλλέκτη:
T_out[0] = 55
# Θερμοκρασία εξόδου από το τελευταίο effect ίση με 40 βαθμούς (βλέπε desalin.fundamentals)
# -Το ψυκτικό μέσο λειτουργεί με φυσική κυκλοφορία η οποία θεωρήθηκε γραμμικά εξαρτώμενη
# από την ηλιακή ακτινοβολία, με σχέσεις που εκτιμήθηκαν από μελέτες που γίνανε σε περιοχές με παρόμοια κλιματικά δεδομένα και ίδιο τύπο συλλέκτη (12)
# Μέσω των αντλιών υποπίεσης, μπορώ να ελέγξω την πίεση στους θαλάμους απόσταξης και κατά
# συνέπεια την hfg και την αναλογία του παραγόμενου νερού προς το νερό τροφοδοσίας και τη συγκέντρωση αλάτων στην άλμη. Το όριο πρέπει να οριστεί για τον τελευταίο θάλαμο γιατί από
# αυτόν εξέρχεται η άλμη με τη μέγιστη αλατότητα.
#
# Κατά συνέπεια από κάθε effect θα βγαίνουν ενδιάμεσες συγκεντρώσεις στην άλμη, κατάλληλες
# για διαφορετικές δραστηριότητες(ιδιαίτερα αν συνδυαστούν με αραίωση).
# H θερμοκρασία της άλμης στην έξοδο κάθε effect είναι ίση με την θερμοκρασία του
# παραγόμενου ατμού
T_s == T_b
# Η θερμοκρασία βρασμού σε κάθε effect ισούται με τη θερμοκρασία της άλμης  μείον το ΒPE και την πτώση που αντιστοιχεί στη ενέργεια για υδροστατική ανύψωση. Ο παραγόμενος ατμός είναι ελαφρώς υπέρθερμος
T_v == T_b - BPE - ΔΤ_y
# -Αμελητέα η απαιτούμενη ενέργεια για υδροστατική ανύψωση λόγω του τύπου εναλλάκτη (Horizontal Falling Films) (13)
# H θερμοκρασία της άλμης επίσης είναι προσεγγιστικά ίση με τη θερμοκρασία στον εναλλάκτη του ίδιου
# effect. Αυτο χρησιμοποιείται για τον υπολογιστό της συναλλαγής θερμότητας με συναγωγή στην
# επιφάνεια του φίλμ
# -Ειδική συναγωγιμότητα για κάθε effect για είσοδο 100 C ορίζεται ως 2.4 kWatt/C*m^2 (13),
# και σε κάθε ακόλουθο effect ισχύει
U[n + 1] == 0.95*U[n]
# Στην βιβλιογραφία, αντίστοιχο παράδειγμα με θερμοκρασία από 100 εώς 40 C για 6 effects οι
# τιμές δίνονταν ως εξής:
U_n == (2.4, 2.28, 2.16, 2.0577, 1.9548, 1.8571)
# Με γραμμική παρεμβολή όριζω
U1(T) := 1.85 + (2.40 - 1.85)/(100 - 40)*(T - 40)
U[0, j] := U1(T_out[j])
U[n, j] := U[0, j]*0.95^n
M1(NA, jm) ≡
    for j ∈ 0 .. jm
        M[:, j] ← NA[:, j][0]
    M
M(NA, nm, jm) :=
    for n ∈ 0 .. nm
        for j ∈ 0 .. jm
            M[n, j] ← NA[n, j][0]
    M
M3D(NA, lm) :=
    for n ∈ 0 .. n_l
        for j ∈ 0 .. j_l
            for i ∈ 0, 0 .. lm
                M[i, n][:, j] ← NA[i, n][0]
    M
# -Θεωρείται ότι η συναλλαγή θερμότητας προς την επιφάνεια συναλλαγής είναι ίση σε όλα τα effects(13)
Q[0]/A[0] == Q[n]/A[n]
# -Θεωρείται ότι η συναλλαγή θερμότητας είναι ίση σε όλα τα effects(13)
Q[1] == Q[n]
# -Για λόγους κόστους απαιτείται η επιφάνεια συναλλαγής θερμότητας να είναι ίση σε όλα τα
# effects(ενιαία διαστασιολόγηση)
A[1] == A[n]
# Και συνεπώς
Q[1]/A[1] == Q[n]/A[n]
# Γενικά ισχύει για συναγωγή
Q == U*A*ΔΤ
# Αρα
U[1]*ΔΤ[1] == U[n]*ΔΤ[n]
# Υπολογίζεται το άθροισμα των αντιστρόφων των συντελεστών
RU_ολ == Σ(1/U_n)
RU_ολ[:, j] := sum(1/U[n, j], n)
DT_ολ[:, j] := T_out[j] - T_b[n_l, j]
DT0[:, j] := DT_ολ[:, j]/(U[0, j]*RU_ολ[:, j])
DT[n, j] := DT0[:, j]*U[0, j]/U[n, j]
DT := M(DT, n_l, j_l)
T_b[0, j] := T_out[j] - DT0[:, j]
Tb1 :=
    for j ∈ 0 .. j_l
        T1[0, j] ← T_b[0, j]
        for n ∈ 1 .. n_l
            T1[n, j] ← T1[n - 1, j] - DT[n, j]
    T1
T_b := Tb1
T_b := M(T_b, n_l, j_l)
BPE1[n, j] := BPE(T_b[n, j], Xapr[n, j])
T_s[n, j] := T_b[n, j] - BPE1[n, j]
T_s[n, 0] = [51.481; 47.8004; 43.9289; 39.8563]
BPE1[n, 0] = [0.0524308; 0.0839384; 0.1144; 0.143724]
T_v[n, j] := T_s[n, j]
T_c[n, j] := T_s[n, j] - DT_p
h_fgv[n, j] := h_fg(T_v[n, j])
h_fgc[n, j] := h_fg(T_c[n, j])
# Η τιμή | h_fgc[n] | συνυπολογίζει τις διάφορες απωλειες στην πίεση
T_b[0, 0] = 51.5334
h_fgv[0, 0] = 2379.95
# Γλυκόλης στην είσοδο του συλλέκτη-προσδιορίζεται συναρτήσει της θερμοκρασίας στο πρώτο effect
n_HE == (T_out - T_in)/(T_out - T_b[0, j])
T_in[j] := T_out[j] - (T_out[j] - T_b[0, j])*n_HE/(1.57 + (2.77 - 1.57)/(0.714 - 0.325)*(ratio[j] - 0.325))
# Τροφοδοτικό νερό
# Για το θαλασσινό νερό ισχύει
C_pw35000 := 3.998
# Για καθαρό νερό:
C_pwd := 4.190
# Για υφάλμυρο:
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# με γραμμικη παρεμβολή παίρνω
Cp_wat(X) := (4.190 - (4.190 - 3.998)*X/35000)
# Για το δεδομένο νερό
Cp_w := Cp_wat(X_f)
Cp_wat(X_f[0]) = 4.16257
# Για την προπυλενογλυκόλη που επιλέχθηκε ως ψυκτικό μέσο ισχύει
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# πηγη (6)
C_pc20 := 2.4702  # kJ/(kg*K)  # στους 20 C
# Aπό το διάγραμμα βλέπω ότι
C_pc120 := 0.74/0.238845896627
C_pc120 = 3.09823
# 1 [kJ/(kg·K)] = 0.238845896627 [Btu/(lb·°F)]
Cp_c(T) := (C_pc20 + (C_pc120 - C_pc20)*T/100)
# Cp άλμης
Cp_bout[j] := Cp_wat(X_bout[j])
Cp_bout[0] = 4.0941
# Μετεωρολογικά δεδομένα
# Επιλέγχθηκε η Σαντορίνη στην οποία χρησιμοποιείται υφάλμυρο νερό και είναι αντιπροσωπευτική για την ευρύτερη περιοχή ως προς την ηλιακή ακτινοβολία από άποψη
# γεωγραφικού πλάτους.
φ == 38  # Γεωγραφικό πλάτος
# Σαντορίνη - Ιούλιος - Σε κεκλιμένο επίπεδο για θερινή μεγιστοποίηση ακτινοβολίας(β=φ-15)
# (πηγή (9))
# Σαντορίνη - Ιούλιος - Σε κεκλιμένο επίπεδο για μεγιστοποίηση ακτινοβολίας όλο το χρόνο(β=φ)
# (πηγή (9))
# Η μελέτη θα γίνει στο διάστημα 5:30 εώς 19.00(χειμερινή ώρα)
# Η μελέτη θα γίνει στο διάστημα 7:30 εώς 17.15(χειμερινή ώρα)
# Για τις θερμοκρασίες που έλειπαν από το PVGIS χρησιμοποιήθηκαν δεδομένα από το ΚΑΠΕ
hour := 5.5, 5.75 .. 20.75
hour = [
    5.5; 5.75; 6; 6.25; 6.5; 6.75; 7; 7.25; 7.5; 7.75
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]
MeteoSummerMax := [
    "Time", "G", "Gd", "Gc", "DNI", "DNIc", "A", "Ad", "Ac", "Td";
    "05:22 ", 15, 15, 21, 0, 0, 80, 16, 72, 22.9;
    "05:37 ", 27, 27, 37, 0, 0, 177, 43, 161, 23.0;
    "05:52 ", 35, 34, 48, 212, 172, 285, 68, 257, 23.2;
    "06:07 ", 63, 44, 77, 292, 236, 387, 89, 349, 23.4;
    "06:22 ", 100, 54, 112, 365, 295, 481, 107, 432, 23.9;
    "06:37 ", 143, 64, 153, 431, 349, 564, 122, 507, 24.4;
    "06:52 ", 193, 74, 198, 491, 397, 639, 135, 573, 24.9;
    "07:07 ", 247, 83, 247, 545, 441, 705, 146, 632, 25.2;
    "07:22 ", 304, 92, 298, 593, 480, 763, 155, 684, 25.4
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]
MeteoJan := [
    "Time", "G", "Gd", "Gc", "DNI", "DNIc", "A", "Ad", "Ac", "Td";
    "06:52 ", 0, 0, 0, 0, 0, 0, 0, 0, 8.9;
    "07:07 ", 0, 0, 0, 0, 0, 0, 0, 0, 9.3;
    "07:22 ", 16, 16, 12, 0, 0, 8, 7, 6, 9.6;
    "07:37 ", 73, 36, 94, 110, 189, 157, 44, 240, 9.9;
    "07:52 ", 127, 61, 169, 167, 288, 254, 82, 386, 10.1;
    "08:07 ", 175, 77, 239, 219, 377, 324, 99, 495, 10.4;
    "08:22 ", 223, 92, 310, 262, 452, 383, 113, 585, 10.6;
    "08:37 ", 270, 105, 378, 298, 513, 432, 125, 659, 10.9;
    "08:52 ", 314, 117, 445, 328, 564, 473, 135, 720, 11.1
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]
Meteo := [
    "Time", "G", "Gd", "Gc", "DNI", "DNIc", "A", "Ad", "Ac", "Td";
    "05:22 ", 14, 14, 19, 0, 0, 80, 16, 72, 22.9;
    "05:37 ", 24, 24, 33, 0, 0, 177, 43, 161, 23.0;
    "05:52 ", 35, 34, 47, 0, 0, 285, 68, 257, 23.2;
    "06:07 ", 45, 44, 61, 0, 0, 387, 89, 349, 23.4;
    "06:22 ", 59, 46, 76, 365, 295, 481, 107, 432, 23.9;
    "06:37 ", 98, 55, 113, 431, 349, 564, 122, 507, 24.4;
    "06:52 ", 143, 65, 155, 491, 397, 639, 135, 573, 24.9;
    "07:07 ", 194, 74, 201, 545, 441, 705, 146, 632, 25.2;
    "07:22 ", 249, 83, 250, 593, 480, 763, 155, 684, 25.4
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]
G_Tjan := submatrix(MeteoJan, 4, 42, 1, 1)
G_T := submatrix(Meteo, 2, 56, 1, 1)
T_ajan := submatrix(MeteoJan, 4, 42, 9, 9)
T_a := submatrix(Meteo, 2, 56, 9, 9)
SummermaxCheck :=
    if SummerMax == 1
        G ← submatrix(MeteoSummerMax, 2, 56, 1, 1)
        T ← submatrix(MeteoSummerMax, 2, 56, 9, 9)
    if SummerMax ≠ 1
        G ← submatrix(Meteo, 2, 56, 1, 1)
        T ← submatrix(Meteo, 2, 56, 9, 9)
    G
G_T := SummermaxCheck
SummerMax
sum(G_T)/4 = 7663.5
sum(G_Tjan)/4 = 3993
SummerorWinter :=
    if winter == 1
        G ← G_Tjan
        T ← T_ajan
    if winter ≠ 1
        G ← G_T
        T ← T_a
    G
SummerorWinter1 :=
    if winter == 1
        G ← G_Tjan
        T ← T_ajan
    if winter ≠ 1
        G ← G_T
        T ← T_a
    T
T_a := SummerorWinter1
G_T := SummerorWinter
# Επιλεκτικός ηλιακός Συλλέκτης
# Επιλέγω σταθερής βάσης με κλίση για ετήσια μεγιστοποίηση παραγωγής β=φ
im := length(G_T) - 1
i := 0, 1 .. im
# Βαθμός απόδοσης συλλέκτη
n_i == FRτα - FRU_L*(T_in - T_a)/G_T  # Πηγή (8), σελ 48
# Απόδοση για Πρωτοβάθμιο πολυώνυμο
n_icorr :=
    for j ∈ 0, 1 .. j_l
        for i ∈ 0 .. im
            x[i, j] ← C_1 - C_2*(T_in[j] - T_a[i])/G_T[i] - C_3*(T_in[j] - T_a[i])^2/G_T[i]
            x[i, j] ← 0.00 if x[i, j] < 0
            x[i, j] ← 1 if x[i, j] > 1
    x
n_icorr == {
    for j ∈ 0, 1 .. j_l
        for i ∈ 0 .. im
            x[i, j] ← FRτα - FRU_L*(T_in[j] - T_a[i])/G_T[i]
            x[i, j] ← 0.00 if x[i, j] < 0
            x[i, j] ← 1 if x[i, j] > 1
    x
}
n_ic := n_icorr
# Παροχή ψυκτικού
m_c == n_i*A_c*G_T/(Cp_c((T_in + T_out)/2)*(T_out - T_in))
m_corr :=
    for j ∈ 0, 1 .. j_l
        for i ∈ 0 .. im
            y[i, j] ← n_ic[i, j]*A_c[j]*G_T[i]/1000/(Cp_c((T_in[j] + T_out[j])/2)*(T_out[j] - T_in[j]))
            y[i, j] ← 10^-18 if y[i, j] < 0
            y[i, j] ← 10^-18 if G_T[i] < minGTlimit
    y
m_c := m_corr
n_ic[:, 0] = [
    0; 0; 0; 0; 0; 0; 0.145735; 0.258123; 0.332893; 0.384605
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]
m_c[:, 0] = [
    0; 0; 0; 0; 0; 0; 0; 0; 0; 0
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]
m_c[:, 0]/A_c[0] = [
    0; 0; 0; 0; 0; 0; 0; 0; 0; 0
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]
Q(y, n) :=
    for j ∈ 0 .. j_l
        for i ∈ 0 .. im
            a[i, j] ← y[i]*n[i, j]
    a
Q1 := Q(G_T, n_ic)
# Παραγόμενες θερμικές κιλοβατόρες ημερησίως, είτε λειτουργεί ο αποστακτήρας είτε όχι
Q_collTOT[j] := A_c[j]*sum(transpose(Q1)[:, i], i)[j]/4
Q_collTOT[0] = 7791.1
Q_collTOT = [7791.1; 7791.1; 7791.1; 7791.1; 7791.1; 7791.1; 7791.1; 7791.1; 7791.1; 7791.1; 7791.1; 7791.1; 7791.1; 7791.1; 7791.1; 7791.1; 7791.1; 7791.1; 7791.1; 7791.1]
# Ενέργεια που απoδίδει η γλυκόλη στον αποστακτήρα
Q1[:, 0]/1000 = [
    0; 0; 0; 0; 0; 0; 0.0282726; 0.0642725; 0.102198; 0.140765
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]
Qef[:, j] := m_c[:, j]*Cp_c((T_in[j] + T_out[j])/2)*(T_out[j] - T_in[j])  # σε KW
# Παραγόμενες θερμικές κιλοβατόρες ημερησίως, για τη λειτουργία του αποστακτήρα
Q_coll[j] := 1000*sum(transpose(Qef)[:, i], i)[j]/4  # Wh
Qef[:, 0] = [
    0; 0; 0; 0; 0; 0; 0; 0; 0; 0
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]
Q_coll = [7432.49; 7432.49; 7432.49; 7432.49; 7432.49; 7432.49; 7432.49; 7432.49; 7432.49; 7432.49; 7432.49; 7432.49; 7432.49; 7432.49; 7432.49; 7432.49; 7432.49; 7432.49; 7432.49; 7432.49]
m_s1ms[n, j] := h_fgc[0, j]/h_fgc[n, j]
m_foliko.ms1[j] := sum(m_s1ms[n, j], n)/ratio[j]
# Λόγος εξάτμισης σε κάθε effect
ratioe[n, j] := n_ef*m_s1ms[n, j]/m_foliko.ms1[j]
# Αλατότητα άλμης 1ου:
X_b1[j] := X_f[j]/(1 - ratioe[0, j])
# Performance Ratio
PR[j] := sum(m_s1ms[n, j], n)
# Ενέργεια που παραλαμβάνει το τροφοδοτικό νερό στον αποστακτήρα
Q_1eff == m_b1*cp_b*(T_b1 - T_fout) + m_s1*(Cp_s*(T_s - T_fout) + h_fgv[0])
# Η οποία είναι ίση με τη διαφορά ενθαλπίας στη γλυκόλη
Q_1eff == m_c*Cp_c*(T_out - T_in)
h''Ts0 :=
    for j ∈ 0 .. j_l
        y[j] ← T_s[0, j]
        x[j] ← h''(y[j])
    x
m_f1[i, j] := Qef[i, j]/(((1 - ratioe[0, j])*Cp_wat(X_b1[j])*T_b[0, j] + ratioe[0, j]*h''(T_s[0, j])) - Cp_w*T_fout[j])
m_f1 := M(m_f1, im, j_l)
m_f := m_f1*n_ef
m_stot[i, j] := ratio[j]*m_f[i, j]
ratioe[0, 0]*h''(T_s[0, 0]) = 1863.38
(1 - ratioe[0, 0])*Cp_wat(X_b1[0])*T_b[0, 0] = 59.4503
Cp_w[0]*T_fout[0] = 145.69
# Υπολογίζονται οι παροχές του παραγόμενου νερού ανά effect
m_sprogram :=
    for n ∈ 0 .. n_l
        for i ∈ 0 .. im
            for j ∈ 0 .. j_l
                y[:, j] ← ratioe[n, j]*m_f[i, j]/n_ef
            x[n, i] ← y
    x
m_f[:, 0] = [
    0; 0; 0; 0; 0; 0; 0; 0; 0; 0
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]
m_s := m_sprogram
# Και η παροχή της αποβαλλόμενης άλμης
m_bout[i, j] := (1 - ratio[j])*m_f[i, j]
Q_1th == m_f/n_ef*Cp_w*(T_out - T_fout)
Q_1/Q_1th == n_HE
T_in == T_out - Q_1/(m_c*Cp_c((T_out + T_in)/2))
Q_1th[i, j] := (m_f[i, j]/n_ef*Cp_w)*(T_b[1, j] - T_fout[j])
Q_1th[:, 0] =  # no stored result
Q_0/A_0 == DT[0]*U[0]
h_fg(T_s, x_ef1) =  # error: This variable is undefined.
# Συμπυκνωτης
m_s[n_l, i][:, j]*h_fgc[3, j]  # H ενέργεια του ατμού που εξέρχεται από το τελευταίο effect
m_w[i, j] := m_s[n_l, i][:, j]*h_fgc[n_l, j]*n_cond/((T_fout[j] - T_f[j])*Cp_w[j])
sum(sum((m_s[n, i]/4)[:, 0]*Cp_w[0]*(T_b[n_l, 0] - T_f[0]), i), n) = [1.243]
m_w := M(m_w, im, j_l)
m_cw := m_w - m_f
sum(m_s[n_l, i][:, 0]*h_fgv[n_l, 0]/4, i) = [7.14819]
# Ημερίσια παροχή ψυκτικού νερού
m_cwDAY[j] := sum(m_cw[i, j], i)
# Ενέργεια που απορρίφθηκε με την άλμη ημερησίως
sum(m_bout[i, 0]/4, i)*(Cp_bout[0]*(T_b[n_l, 0] - T_f[0])) = 0.489707
m_bout[:, 0] = [
    0; 0; 0; 0; 0; 0; 0; 0; 0; 0
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]
m_cw[:, 0] = [
    0; 0; 0; 0; 0; 0; 0; 0; 0; 0
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]
(m_cw/m_f)[:, 0] = [
    3.62386; 3.62386; 3.62386; 3.62386; 3.62386; 3.62386; 3.62386; 3.62386; 3.62386; 3.62386
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]
(m_cw*Cp_c((T_in + T_out)/2)/(m_f*Cp_w))[:, 0] = [
    2.44849; 2.44849; 2.44849; 2.44849; 2.44849; 2.44849; 2.44849; 2.44849; 2.44849; 2.44849
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]
Cp_w*(T_b[n_l, 0] - T_f[0])*sum(m_bout[i, 0]/4, i) = [0.497898; 0.497898; 0.497898; 0.497898; 0.497898; 0.497898; 0.497898; 0.497898; 0.497898; 0.497898; 0.497898; 0.497898; 0.497898; 0.497898; 0.497898; 0.497898; 0.497898; 0.497898; 0.497898; 0.497898]
# Παρατηρώ οτί η αναλογία γλυκόλης
m_cw*Cp_c/(m_f*Cp_w)  # εχει τιμή περίπου 2.77 για ratio 0.714
# Θα χρησιμοποιήσω γραμμική παρεμβολη για να κάνω τις πράξεις για το πρώτο effect
# 1.57 για 0.325
# Δυσμενέστερη εκτίμηση για την ειδική συναγωγιμότητα των εναλλακτών (plate heat exchanger) (2)
U_ex := 1  # KW/(m^2*K)
Maxj(m) :=
    for j ∈ 0 .. j_l
        A[j] ← max(m[:, j])
    A
AHE(Q) :=
    for j ∈ 0 .. j_l
        A ← max(Q[:, j])
        B[j] ← A/(DT[0, j]*U[0, j])
    B
AHE2 :=
    for j ∈ 0 .. j_l
        A[j] ← max(m_f[:, j])
    A
Aex(Q) :=
    for j ∈ 0 .. j_l
        A ← max(Q[:, j])
        B[j] ← A/((T_b[n_l, j] - T_fout[j])*U_ex)
    B
m_cwmax := Maxj(m_cw)
m_boutmax := Maxj(m_bout)
m_fmax := AHE2
A_HE1 := AHE(Qef)
m_smax[j] := m_fmax[j]*ratio[j]
# Μέγιστη Ανακτώμενη θερμότητα από άλμη
Qrecbrine[:, j] := n_HE*m_boutmax[j]*(Cp_wat(X_b1[j])*(T_b[n_l, j] - T_f[j]))
m_cwbrine[i, j] := n_HE*m_bout[i, j]*Cp_wat(X_b1[j])*(T_b[n_l, j] - T_f[j])/(Cp_w[j]*(T_fout[j] - T_f[j]))
m_cwMAXbrine[:, j] := Qrecbrine[:, j]/((T_fout[j] - T_f[j])*Cp_w[j])
A_exbrine := Aex(Qrecbrine)
A_exbrine[0] = 0.0123584
# Ενθαλπία παραγόμενου νερού
Qprd :=
    for n ∈ 0 .. n_l
        for i ∈ 0 .. im
            for j ∈ 0 .. j_l
                y[:, j] ← m_s[n, i][:, j]*(C_pwd*(T_s[n, j] - T_f[j]))
            x[n, i] ← y
    x
Qprod := Qprd
Qprdsum :=
    for j ∈ 0 .. j_l
        for i ∈ 0 .. im
            y[i, j] ← sum(Qprd[n, i][:, j], n = 0 .. n_l)
    y
Qprodsum := Qprdsum
Qprodsum := M(Qprodsum, im, j_l)
# Θερμοκρασία συνολικού ρεύματος παραγόμενου νερού
T_averageout[:, j] := sum(T_s[n, j]*m_s1ms[n, j], n)/sum(m_s1ms[n, j], n)
T_averageout[:, 0] = [45.7855]
Aex1(Q) :=
    for j ∈ 0 .. j_l
        A ← max(Q[:, j])
        B[j] ← A/((T_averageout[:, j] - T_fout[j])*U_ex)
    B
m_cwforprod[i, j] := Qprodsum[i, j]/(Cp_w[j]*(40 - T_f[j]))
# Μέγιστη Ανακτώμενη θερμότητα από παραγόμενο νερό
Qrecprod[:, j] := n_HE*m_smax[j]*(Cp_wat(X_b1[j])*(T_averageout[:, j] - T_f[j]))
m_cwMAXprod[:, j] := Qrecprod[:, j]/((T_fout[j] - T_f[j])*Cp_w[j])
A_exd := Aex1(Qrecprod)
A_exd := transpose(M1(transpose(A_exd), j_l))
A_exd[0] = 0.0176128
# Ονομαστική επιφάνεια συναλλαγής θερμότητας
A_HE1[0] = 0.170207
m_cwbrineTOT[j] := 3600/4*sum(m_cwbrine[:, j])
ProdEnergy[:, j] := sum(Qprodsum[i, j], i)/4
A_HEtot := n_ef*A_HE1
A_HEtot[0] = 0.680829  # m^2
m_smax[0] = 0.00188462
ProdEnergy := transpose(M1(ProdEnergy, j_l))
m_cwbrineTOT[0] = 16.9351
SpecificHTArea := A_HEtot/m_smax
SpecificHTArea[0] = 361.255
# Ενθαλπία στην είσοδο
# Παραγόμενα λίτρα ημερησίως:
TotalProduct[j] := sum(m_stot[:, j])*3600/4
Q_coll[0] = 7432.49
Qin[j] := Q_coll[j]/1000
Qin[0] = 7.43249
m_cwDAY[j] := 3600/4*sum(m_cw[:, j])
m_bDAY[j] := 3600/4*sum(m_bout[:, j])
ProductivityChange := (TotalProduct[j_l] - TotalProduct[0])/TotalProduct[0]*100 = 0  # %
m_cwprodTOT[j] := 3600/4*sum(m_cwforprod[i, j], i)
m_cwprodTOT := transpose(M1(transpose(m_cwprodTOT), j_l))
kw_m3 := Q_coll/(TotalProduct/0.9982071)
Q_coll[0]/1000 = 7.43249
m_cwDAY[0] = 218.246  # Κιλά ψυκτικού νερού ημερησίως στους 35
# Κιλά ψυκτικού νερού που μπορούν να ζεσταθούν στους 40 Κελσίου ψύχοντας το παραγόμενο νερό
m_cwprodTOT[0] = 53.3006
# Ενθαλπία στην έξοδο
m_bDAY[0] = 17.2243  # Κιλά άλμης ημερησίως
TotalProduct[0] = 43.0004  # Κιλά νερό ημερησίως
Qout[j] := ProdEnergy[j] + (sum(m_cw[i, j]*(Cp_w[j]*(T_fout[j] - T_f[j])), i) + sum(m_bout[i, j]*(Cp_w[j]*(T_fout[j] - T_f[j])), i))/4
m_smax = [0.00188462; 0.00188462; 0.00188462; 0.00188462; 0.00188462; 0.00188462; 0.00188462; 0.00188462; 0.00188462; 0.00188462; 0.00188462; 0.00188462; 0.00188462; 0.00188462; 0.00188462; 0.00188462; 0.00188462; 0.00188462; 0.00188462; 0.00188462]
Qout[0] = 6.98609
Λιτρα := TotalProduct/0.9982071
Λιτρα[0] = 43.0777  # Λίτρα για 20 Κελσίου
# Απώλειες μέσα στη συσκευή | Ποσοστό απωλειών
Λιτρα[j_l] = 43.0777
Q_L := Qin - Qout  # ΚWh/μερα
kw_m3[0] = 172.537  # Kwh/m^3  # παραγομενου νερου
U_L := Q_L/Qin
U_L[0] = 0.0600611
Q_L[0] = 0.446404
# Performance ratio
PR[0] = 3.97702
# Για ratio 0.325, 40 Κελσιου,2000 ppm
Q_hotwater[j] := sum(m_cw[i, j]*(Cp_w[j]*(T_fout[j] - T_f[j])), i)/4  # Ποσοστά ανάκτησης θερμότητας για το θερμοσίφωνα
Q_hotwater[0] = 5.04702
n_Rcondenser := Q_hotwater/Qin
[
    4, 6, 8, 12, 16, 24, 32, effects;
    192.928, 129.339, 97.267, 65.01, 48.813, 32.569, 24.431, Kwh/m^3;
    251.49, 375.134, 498.827, 746.334, 993.989, 1.49*10^3, 1.986*10^3, λιτρα για 10m^2;
    3.977, 5.963, 7.948, 11.922, 15.897, 23.854, 31.819, PR
]  # Ανακτώμενη θερμότητα από εναλλάκτη με παραγόμενο νερό:
Q_productRecov := n_HE*ProdEnergy
Q_productRecov[0] = 1.2326
n_Rprod := Q_productRecov/Qin
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Q_brineRecov[j] := n_HE*sum(m_bout[i, j]/4, i)*(Cp_wat(X_b1[j])*(T_b[n_l, j] - T_f[j]))
n_Rbrine := Q_brineRecov/Qin
Q_brineRecov[0] = 0.391631
n_RTOT := n_Rcondenser + n_Rprod + n_Rbrine
n_Rbrine[0] = 0.0526918
n_Rprod[0] = 0.165839
n_Rcondenser[0] = 0.679049
# Ποσοστό θερμότητας που ανακτάται συνολικά για
# χρήση στο θερμοσίφωνα
n_RTOT[0] = 0.897579
# Θεωρώντας:
DailyDemandperPerson := 150  # μέσος όρος για Ευρώπη  και μικρους Ελληνικούς οικισμούς
People := 4
DailyDemand := DailyDemandperPerson*People*0.9982071  # Σε κιλά
# Επιφάνεια συλλογής βρόχινου νερού
FaucetPerc := 0.157
ShowerPerc := 0.168
A_rain := 50
# Μέση ετήσια βροχόπτωση
ToiletPerc := 0.267
ClothesWash := 0.217
Precipitation := 500
# Μέση ημερησια παροχή νερού:
FaucDem := DailyDemand*FaucetPerc = 94.0311
ShowDem := DailyDemand*ShowerPerc = 100.619
RainSupply := A_rain*Precipitation*0.95/365 = 65.0685
ClothesWashDem := DailyDemand*ClothesWash = 129.967
ToilDem := DailyDemand*ToiletPerc = 159.913
# Yφάλμυρο
HotWaterDemand := ShowDem + ClothesWashDem = 230.586
PotableWaterDemand := FaucDem = 94.0311
PotableWaterDemandR := PotableWaterDemand - RainSupply = 28.9626  # Θαλασσινό
PotableDemandMetRatio := 100*TotalProduct[0]/PotableWaterDemand = 45.73
PotableWaterDemandSalt := FaucDem + ShowDem + ClothesWashDem = 324.617
PotableWaterDemandSaltR := FaucDem + ShowDem + ClothesWashDem - RainSupply = 259.548
PotableDemandMetRatioR := 100*TotalProduct[0]/PotableWaterDemandR = 148.469
PotableDemandMetRatioSalt := (100*TotalProduct)/PotableWaterDemandSalt
HotWaterCoverage := (100*m_cwDAY)[0]/HotWaterDemand = 94.6485  # Υποθέτωντας συλλογή βροχινου:
GrayWaterToilDem := ToilDem - m_bDAY[0] = 142.689
PotableDemandMetRatioSaltR := (100*TotalProduct)/PotableWaterDemandSaltR
PotableDemandMetRatioSalt[0] = 13.2465
BrineToiletCoverage := (100*m_bDAY)[0]/ToilDem = 10.771
PotableDemandMetRatioSaltR[0] = 16.5674
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# Ονομαστική παροχή ψυκτικού σε κυβικά ανα ώρα
3600/0.9982071*1/1000*m_cwmax[0] = 0.0344968
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# Κόστος Συλλεκτών | Θεωρώντας ότι
Cost_coll :=
    A_c*140 if C_1 < 0.5
    (A_c*100) if C_1 > 0.5
# 1 US$ = 0.765228038 Euros
Cost_coll[0] = 201
Cost_coll[j_l] = 201
UStoE := 0.765228038
# Κόστος Αποστακτήρα | Κόστος 2 εναλλάκτων
Cost_Evap := UStoE*n_ef*4135*A_HE1^0.786
Cost_HE(A1) := UStoE*1224*A1^0.57
Cost_Evap[0] = 3146.84
Cost_Evap[j_l] = 3146.84
Cost_HEtot := Cost_HE(A_exbrine) + Cost_HE(A_exd)
Cost_HEtot[0] = 170.248
# 1 Αντλία γλυκόλης, 3 ψυκτικού, 1 τροφοδοτικού νερού | Κόστος Αντλιών κενού
Cost_vacPump := (n_ef + 1)*150 = 750
Cost_Pump[j] := 5*UStoE*3600/0.9982071*1/1000*m_cwmax[j]^0.825*65
Cost_Pump[0] = 19.3567
Cost_Pump[j_l] = 19.3567
# Εκτιμώμενο κόστος στοιχείων εγκατάστασης συνυπολογίζοντας τους ηλιακούς συλλέκτες:
Cost_withcollectors := Cost_coll + Cost_Evap + Cost_HEtot + Cost_Pump + Cost_vacPump
# Εκτιμώμενο καθαρό κόστος στοιχείων εγκατάστασης:
Cost := Cost_Evap + Cost_HEtot + Cost_Pump + Cost_vacPump
Cost_withcollectors[0] = 4287.45
Cost_withcollectors[j_l] = 4287.45
Cost[j_l] = 4086.45
Cost[0] = 4086.45
CostPerCMperDay
CostDifference := 100*(Cost[j_l] - Cost[0])/Cost[0] = 0
# 16 eff
# 8 eff
# 4 eff
# Κόστος εγκατάστασης ανά κυβικό | min coll 1 | 2.887*10^5 | 1.514*10^5 | 9.466*10^4
# max coll 16 | 7.444*10^4 | 4.375*10^4
CostPerCMperDay := 1000*Cost/Λιτρα
CostPerCMperDayColl := 1000*Cost_withcollectors/Λιτρα
# για 100 m^2 συλλέκτη | 3.408*10^4
7.012*10^4
2.2*10^4
# για 1000 m^2 συλλέκτη
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CostPerCMperDay[0] = 94862.4
CostPerCMperDay[j_l] = 94862.4
CostPerCMperDayDifference := 100*(CostPerCMperDay[j_l] - CostPerCMperDay[0])/CostPerCMperDay[0] = 0
# Διατηρώντας τις υπολοιπες θερμοκρασίες και τιμές πλην των παροχών σταθερές στις προαναφερθείντες θέσεις και μεταβάλλοντας μια τιμή καθε φορα,
# Διαπιστώθηκαν τα εξής
# -Εξαιτίας του συμπυκνωτή, η θερμοκρασία εισόδου του τροφοδοτικού νερού δεν επιρρεάζει καθόλου την λειτουργία της μονάδας διότι είναι καθορισμένη η θερμοκρασία εξόδου από το συμπυκνωτή, αυτορυθμιζόμενη από την παροχή ψυκτικού νερού.
# -Το παραγόμενο νερό έχει γραμμική εξάρτηση με τον αριθμό των συλλεκτών, και περισσότεροι συλλέκτες για τις ίδιες ρυθμίσεις δεν μεταβάλλουν το κόστος KWh ανα κυβικό
# Για ratio 0.325, για πάνω από 8 effects η παροχή είναι τόσο μεγάλη που δε χρειάζεται ψυκτικό νερό
# στο συμπυκνωτή. Αντίθετα δεν υπάρχει αρκετή ενέργεια για να ανεβάσει το τροφοδοτικό
# νερό στην απαιτούμενη θερμοκρασία.
# Το ίδιο ισχύει για αλμυρό νερό για 0.714 πάνω από 19 effects
# Η μεταβολή του λόγου εξάτμισης από 0.325 σε 0.714(μέγιστη τιμή) αυξάνει την παραγωγή απεσταγμένου νερού κατά 4.091% και μειώνει κατά 2.258 % τα κατασκευαστικά κόστη για 38000 ppm
# 4.31 | 2.256 | για 2000 ppm
# Να ληφθούν υπόψην οι ανησυχίες της διάβρωσης για πολύ υψηλές αλατότητες στην άλμη
m_cw/m_f
CostPerCMperDayColl
kw_m3[15] = 172.537
asa[i] := m_f[i, 0]
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asa[0] = 6.33781e-21
A_c[0] = 2.01
Λιτρα[0] = 43.0777
Λιτρα[j_l] = 43.0777
Λιτρα
winter ≡ 0
PotableDemandMetRatioSalt
SummerMax ≡ 0
W/m^2
PR[0] = 3.97702  # m_cwDAY
n_ef ≡ 4
kw_m3[0] = 172.537
EXPORT := augment(asa, G_T)
SpecificHTArea[0] = 361.255  # Cost_withcollectors
# G_T | Cost
# [component: inputs EXPORT]
CostPerCMperDay
Cost[1] = 4086.45
Λιτρα = [43.0777; 43.0777; 43.0777; 43.0777; 43.0777; 43.0777; 43.0777; 43.0777; 43.0777; 43.0777; 43.0777; 43.0777; 43.0777; 43.0777; 43.0777; 43.0777; 43.0777; 43.0777; 43.0777; 43.0777]
CostPerCMperDay[19] = 94862.4
m_cw[29, j]/m_f[29, j]
SpecificHTArea[0] = 361.255
Cost_withcollectors[0] = 4287.45
0.164
0.049
Cost[0] = 4086.45
Cost_withcollectors[j_l] = 4287.45
Cost[j_l] = 4086.45
